# for robot1
ORIGIN := 1
g := g*(m/s^2)^-1 = 9.80665
l1 := 0.20
l2 := 0.40
l3 := 0.25
l4 := 0.20
l45 := 0.05  # ????рандомная пятёрка
l5 := 0.15
# материал Ал5
σ_t := 180*10^6  # Па
ρ := 2680  # кг/м3
Δ := 4  # мм  # толщина стенки
ε := 0.3  # угловое ускорение
Δ := Δ*10^-3
J(d) := π/64*(d^4 - (d - 2*Δ)^4)
Jm_xy(d, l) := 1/12*(3/4*(d^2 + (d - 2*Δ)^2) + l^2)
K(d) := π/4*(d^2 - (d - 2*Δ)^2)*ρ
Jm_z(d) := 1/(2*4)*(d^2 + (d - 2*Δ)^2)
d_1 := 100  # мм
d_2 := 100  # мм
d_3 := 100  # мм
d_1 := d_1*10^-3
d_4 := 100  # мм
d_2 := d_2*10^-3
d_5 := 40  # мм
d_3 := d_3*10^-3
# Массы звеньев (Соединяющие трубы)
# Массы шарниров (Двигатель + Редуктор + Датчик)
d_4 := d_4*10^-3
k1 := K(d_1) = 3.23308
m_l1 := k1*l1 = 0.646615
m_joint0 := (94 + 60 + 158)*10^-3  # кг
d_5 := d_5*10^-3
k2 := K(d_2) = 3.23308
m_l2 := k2*l2 = 1.29323
m_joint1 := (650 + 1500 + 118)*10^-3
m_joint0 := 4*m_joint0 = 1.248
k3 := K(d_3) = 3.23308
m_l3 := k3*l3 = 0.808269
m_l1 := 1.25*m_l1
m_joint2 := (180 + 680 + 118)*10^-3
m_joint1 := 4*m_joint1 = 9.072
k4 := K(d_4) = 3.23308
m_l4 := k4*l4 = 0.646615
m_l2 := 1.25*m_l2
m_joint2 := 4*m_joint2 = 3.912
k5 := K(d_5) = 1.2124
m_l5 := k5*l5 = 0.181861
m_joint3 := (180 + 680 + 118)*10^-3
m_l3 := 1.25*m_l3
m_joint3 := 4*m_joint3 = 3.912
m_joint4 := (94 + 295 + 62)*10^-3
m_l4 := 1.25*m_l4
K_зап := 2  # Масса груза
m_joint4 := 4*m_joint4 = 1.804
m_load := 5
m_l5 := 1.25*m_l5
m_joint5 := (64 + 60 + 62)*10^-3
m_joint6 := 1.5
m_joint5 := 4*m_joint5 = 0.744
m_load := m_load + m_joint6 = 6.5
R_l1 := 0 = 0
R_joint1 := 0 = 0
J_1 := J(d_1) = 1.39215e-6
Jm_xy1 := m_l1*Jm_xy(d_1, l1) = 0.00362697
Jm_z1 := m_l1*Jm_z(d_1) = 0.00186548
R_l2 := R_l1 + 0.5*l2 = 0.2
R_joint2 := R_joint1 + l2 = 0.4
J_2 := J(d_2) = 1.39215e-6
Jm_xy2 := m_l2*Jm_xy(d_2, l2) = 0.0234193
Jm_z2 := m_l2*Jm_z(d_2) = 0.00373097
R_l3 := R_l2 + 0.5*l2 + 0.5*l3 = 0.525
R_joint3 := R_joint2 + l3 = 0.65
J_3 := J(d_3) = 1.39215e-6
Jm_xy3 := m_l3*Jm_xy(d_3, l3) = 0.0064281
Jm_z3 := m_l3*Jm_z(d_3) = 0.00233186
R_l4 := R_l3 + 0.5*l3 + 0.5*l4 = 0.75
R_joint4 := R_joint3 + l4 = 0.85
R_l5 := R_l4 + 0.5*l4 + 0.5*l5 = 0.925
R_joint5 := R_joint4 + l45 = 0.9
J_4 := J(d_4) = 1.39215e-6
Jm_xy4 := m_l4*Jm_xy(d_4, l4) = 0.00362697
Jm_z4 := m_l4*Jm_z(d_4) = 0.00186548
R_l6 := R_l5 + 0.5*l5 = 1
J_5 := J(d_5) = 7.41919e-8
Jm_xy5 := m_l5*Jm_xy(d_5, l5) = 0.000463517
Jm_z5 := m_l5*Jm_z(d_5) = 7.45628e-5
M_joint5 := Jm_z5 = 7.45628e-5  # считаем динамический, а не статический
M_joint5 := M_joint5*ε = 2.23688e-5
σ_5 := M_joint5/J_5*d_5/2
K_тек := σ_t/σ_5 = 29850746
K_зап = 2
M_joint4 := m_load*(R_l6 - R_joint4) + m_l5*(R_l5 - R_joint4) + m_joint5*(R_joint5 - R_joint4)
M_joint4 := M_joint4*g = 10.0935
σ_5 := M_joint4/J_5*d_5/2
K_тек := σ_t/σ_5 = 66.1542
K_зап = 2
M_joint3 := m_load*(R_l6 - R_joint3) + m_l5*(R_l5 - R_joint3) + m_joint5*(R_joint5 - R_joint3) + m_l4*(R_l4 - R_joint3) + m_joint4*(R_joint4 - R_joint3)
M_joint3 := M_joint3*g = 29.0781
σ_4 := M_joint3/J_4*d_4/2 = 1044357
K_тек := σ_t/σ_4 = 172.355
K_зап = 2
M_joint2 := m_load*(R_l6 - R_joint2) + m_l5*(R_l5 - R_joint2) + m_joint5*(R_joint5 - R_joint2) + m_l4*(R_l4 - R_joint2) + m_joint4*(R_joint4 - R_joint2) + m_l3*(R_l3 - R_joint2) + m_joint3*(R_joint3 - R_joint2)
M_joint2 := M_joint2*g = 64.6291
σ_3 := M_joint2/J_3*d_3/2 = 2321192
K_тек := σ_t/σ_3 = 77.5464
K_зап = 2
M_joint1 := m_load*(R_l6 - R_joint1) + m_l5*(R_l5 - R_joint1) + m_joint5*(R_joint5 - R_joint1) + m_l4*(R_l4 - R_joint1) + m_joint4*(R_joint4 - R_joint1) + m_l3*(R_l3 - R_joint1) + m_joint3*(R_joint3 - R_joint1) + m_l2*(R_l2 - R_joint1) + m_joint2*(R_joint2 - R_joint1)
M_joint1 := M_joint1*g = 142.008
σ_2 := M_joint1/J_2*d_2/2 = 5100311
K_тек := σ_t/σ_2 = 35.292
K_зап = 2
M_joint0 := (m_load*R_l6^2) + (Jm_xy5 + m_l5*R_l5^2) + (m_joint5*R_joint5^2) + (m_joint4*R_joint4^2) + (Jm_xy4 + m_l4*R_l4^2) + (m_joint3*R_joint3^2) + (Jm_xy3 + m_l3*R_l3^2) + (m_joint2*R_joint2^2) + (Jm_xy2 + m_l2*R_l2^2) + (m_joint1*R_joint1^2) + Jm_z1
M_joint0 = 11.7129  # кг*м2
M_joint0 := M_joint0*ε = 3.51386
σ_1 := M_joint0/J_1*d_1/2
K_тек := σ_t/σ_1 = 1426.28
K_зап = 2
m_all := m_l1 + m_l2 + m_l3 + m_l4 + m_l5 + m_joint0 + m_joint1 + m_joint2 + m_joint3 + m_joint4 + m_joint5 + m_joint6 = 26.6627  # кг
m_all + m_load - m_joint6 = 31.6627
T_din := (m_load*R_l6^2) + (Jm_xy5 + m_l5*R_l5^2) + (m_joint5*R_joint5^2) + (m_joint4*R_joint4^2) + (Jm_xy4 + m_l4*R_l4^2) + (m_joint3*R_joint3^2) + (Jm_xy3 + m_l3*R_l3^2) + (m_joint2*R_joint2^2) + (Jm_xy2 + m_l2*R_l2^2) + (m_joint1*R_joint1^2)
T_din := T_din*ε = 3.5133
T_o := T_din + M_joint1 = 145.522
Ti1 := J2*ε + J3*ε + J4*ε + J5*ε + J6*ε  # error: Эта переменная не определена.
# Для сечения сила устойчивости
d_нар := 20*10^-3
d_отв := 8*10^-3
l_вал := 24*10^-3
J_сеч_вал := π/64*(d_нар^4 - d_отв^4)
A_сеч_вал := π/4*(d_нар^2 - d_отв^2)
σ_t_ст3 := 205*10^6  # Па
K_зап_вал := 2
M_max := 2*σ_t_ст3*J_сеч_вал/(K_зап_вал*d_нар) = 78.4424  # Нм
F_max := M_max/l_вал = 3268.43  # Н
F_max/10^3 = 3.26843  # кН
σ_срез_ст3 := 0.2*σ_t_ст3 = 41000000
F_срез := σ_срез_ст3/K_зап_вал*A_сеч_вал = 5409.82
F_срез/10^3 = 5.40982  # кН
