# for robot1
L1 := 0.20
k1 := 1
M1 := k1*L1 = 0.2
g = 9.80665 m/s^2
J2 := □
L2 := 0.40
k2 := 1
M2 := k2*L2 = 0.4
J3 := □
L3 := 0.25
k3 := 1
M3 := k3*L3 = 0.25
J4 := □
ε := □
L4 := 0.20
k4 := 1
M4 := k4*L4 = 0.2
J5 := □
L5 := 0.15
k5 := 1
M5 := k5*L5 = 0.15
J6 := □
M6 := 5
R2 := 0.5*L2 = 0.2
R3 := R2 + 0.5*L2 + 0.5*L3 = 0.525
R4 := R3 + 0.5*L3 + 0.5*L4 = 0.75
R5 := R4 + 0.5*L4 + 0.5*L5 = 0.925
Ti1 := J2*ε + J3*ε + J4*ε + J5*ε + J6*ε  # error: Этой функции требуется не менее 3 аргументов, но применяется она к 1.
R6 := R5 + 0.5*L5 = 1
To1 := M1*g + M2*g*R2 + M3*g*R3 + M4*g*R4 + M5*g*R5 + M6*g*R6 = 55.8979 m/s^2
# for robot2
L1 := 0.1
k1 := 1
R2 := 0.3
J2 := □
L2 := 0.2
k2 := 1
M1 := k1*(L1 + L2) = 0.3
R3 := 0.6
J4 := □
L3 := 0.6
k3 := 1
M2 := k2*L3 = 0.6
R4 := 0.8
ε := □
L4 := 0.15
k4 := 1
M3 := k3*L4 = 0.15
R5 := 1
L5 := 0.4
k5 := 1
M4 := k4*L5 = 0.4
L6 := 0.6
k6 := 1
M5 := k5*L6 + 5 = 5.6
k7 := 1
To1 := M1*g + M2*g*R2 + M3*g*R3 + M4*g*R4 + M5*g*R5 = 63.6452 m/s^2
Ti1 := J2*ε + J4*ε  # error: Этой функции требуется не менее 3 аргументов, но применяется она к 1.
# for robot3
J2 := □
R2 := 0.25
L1 := 1
k1 := 1
J4 := □
M1 := k1*L1 = 1
R3 := 0.5
L2 := 0.5
k2 := 1
J5 := □
M2 := k2*L2 = 0.5
R4 := 0.6
L3 := 0.2
k3 := 1
J6 := □
M3 := k3*L3 = 0.2
R5 := 0.8
L4 := 0.2
k4 := 1
ε := □
M4 := k4*L4 = 0.2
R6 := 1
L5 := 0.2
k5 := 1
M5 := k5*L5 = 0.2
R7 := 1.1
k6 := 1
M6 := k6*L6 = 0.6
k7 := 1
M7 := 5
To1 := M1*g + M2*g*R2 + M3*g*R3 + M4*g*R4 + M5*g*R5 + M6*g*R6 + M7*g*R7 = 74.5796 m/s^2
Ti1 := J2*ε + J4*ε + J5*ε + J6*ε  # error: Этой функции требуется не менее 3 аргументов, но применяется она к 1.
